<?xml version="1.0"?>
<!--
  File:     my_engine.xml
  Author:   Aero-Matic v 0.81

  Inputs:
    name:           my_engine
    type:           turbine
    thrust:         11191 lb
    augmented?      yes
    injected?       no
-->

<turbine_engine name="my_engine">
  <milthrust> 11191.0 </milthrust>
  <!-- <maxthrust> 16786.5 </maxthrust> -->
  <maxthrust> 34170.0 </maxthrust>
  <bypassratio>     1.0 </bypassratio>
  <tsfc>            0.8 </tsfc>
  <atsfc>           1.7 </atsfc>
  <bleed>           0.03</bleed>
  <idlen1>         30.0 </idlen1>
  <idlen2>         35.0 </idlen2>
  <maxn1>         100.0 </maxn1>
  <maxn2>         106.0 </maxn2>
  <augmented>         1 </augmented>
  <augmethod>         1 </augmethod>
  <injected>          0 </injected>

  <function name="IdleThrust">
   <table>
    <independentVar lookup="row">velocities/mach</independentVar>
    <independentVar lookup="column">atmosphere/density-altitude</independentVar>
    <tableData>
         -10000     0     10000   20000   30000   40000   50000
     0.0  0.0430  0.0488  0.0528  0.0694  0.0899  0.1183  0.1467
     0.2  0.0500  0.0501  0.0335  0.0544  0.0797  0.1049  0.1342
     0.4  0.0040  0.0047  0.0020  0.0272  0.0595  0.0891  0.1203
     0.6  0.0     0.0     0.0     0.0     0.0276  0.0718  0.1073
     0.8  0.0     0.0     0.0     0.0     0.0474  0.0868  0.0900
     1.0  0.0     0.0     0.0     0.0     0.0     0.0552  0.0800
    </tableData>
   </table>
  </function>

  <function name="MilThrust">
   <table>
    <independentVar lookup="row">velocities/mach</independentVar>
    <independentVar lookup="column">atmosphere/density-altitude</independentVar>
    <tableData>
					-10000	0				10000		20000		30000		40000		50000		60000
0.0000	1.5138	1.3927	1.2034	0.8840	0.7463	0.5813	0.3966	0.2286
0.2000	1.5438	1.4203	1.2273	0.9016	0.7611	0.5928	0.4045	0.2331
0.4000	1.5642	1.4391	1.2436	0.9135	0.7712	0.6007	0.4098	0.2362
0.6000	1.6267	1.4966	1.2932	0.9500	0.8020	0.6247	0.4262	0.2456
0.8000	1.6964	1.5607	1.3486	0.9907	0.8363	0.6514	0.4445	0.2562
1.0000	1.7865	1.6436	1.4203	1.0433	0.8807	0.6860	0.4681	0.2698
1.2000	1.8766	1.7265	1.4919	1.0959	0.9252	0.7206	0.4917	0.2834
1.4000	1.9523	1.7961	1.5521	1.1401	0.9625	0.7497	0.5115	0.2948
1.6000	2.0304	1.8679	1.6141	1.1857	1.0010	0.7797	0.5320	0.3066
1.8000	2.1027	1.9345	1.6716	1.2280	1.0366	0.8074	0.5509	0.3175
2.0000	2.1565	1.9840	1.7144	1.2594	1.0632	0.8281	0.5650	0.3256
2.0000	2.1908	2.0155	1.7416	1.2794	1.0800	0.8412	0.5740	0.3308
2.2000	2.2035	2.0272	1.7518	1.2868	1.0863	0.8461	0.5773	0.3327
2.4000	2.2120	2.0351	1.7586	1.2918	1.0905	0.8494	0.5795	0.3340
2.6000	2.1784	2.0041	1.7318	1.2722	1.0739	0.8365	0.5707	0.3289
2.8000	2.1028	1.9346	1.6717	1.2280	1.0367	0.8075	0.5509	0.3175
3.0000	1.9872	1.8283	1.5799	1.1605	0.9797	0.7631	0.5207	0.3001

    </tableData>
   </table>
  </function>

  <function name="AugThrust">
   <table>
    <independentVar lookup="row">velocities/mach</independentVar>
    <independentVar lookup="column">atmosphere/density-altitude</independentVar>
	<tableData>
			-10000	0				10000		20000		30000		40000		50000		60000		70000		80000
0.00	1.5296	1.4455	1.2940	1.1502	0.9973	0.9193	0.7709	0.7434	0.6440	0.5981
0.20	1.4638	1.3833	1.2384	1.1008	0.9544	0.8798	0.7378	0.7114	0.6163	0.5724
0.40	1.4434	1.3640	1.2211	1.0854	0.9411	0.8675	0.7275	0.7015	0.6077	0.5644
0.60	1.4607	1.3804	1.2358	1.0985	0.9524	0.8779	0.7362	0.7099	0.6150	0.5711
0.80	1.5155	1.4321	1.2821	1.1396	0.9881	0.9108	0.7638	0.7365	0.6380	0.5925
1.00	1.6066	1.5182	1.3592	1.2082	1.0475	0.9656	0.8097	0.7808	0.6764	0.6282
1.20	1.7200	1.6254	1.4551	1.2934	1.1214	1.0337	0.8669	0.8359	0.7241	0.6725
1.40	1.8595	1.7573	1.5732	1.3984	1.2124	1.1176	0.9372	0.9037	0.7829	0.7271
1.60	2.0338	1.9219	1.7206	1.5294	1.3260	1.2223	1.0250	0.9884	0.8562	0.7952
1.80	2.2396	2.1164	1.8947	1.6842	1.4602	1.3460	1.1288	1.0885	0.9429	0.8757
2.00	2.4026	2.2704	2.0326	1.8067	1.5665	1.4440	1.2109	1.1677	1.0115	0.9394
2.20	2.5502	2.4099	2.1574	1.9177	1.6627	1.5326	1.2853	1.2394	1.0736	0.9971
2.40	2.7482	2.5971	2.3250	2.0667	1.7918	1.6517	1.3851	1.3356	1.1570	1.0746
2.60	2.9152	2.7549	2.4663	2.1922	1.9007	1.7520	1.4693	1.4168	1.2273	1.1398
2.80	3.1003	2.9298	2.6229	2.3314	2.0214	1.8633	1.5626	1.5068	1.3052	1.2122
3.00	3.2958	3.1145	2.7882	2.4784	2.1489	1.9808	1.6611	1.6018	1.3875	1.2887
3.20	3.3719	3.1865	2.8526	2.5357	2.1985	2.0265	1.6994	1.6388	1.4196	1.3184
3.40	3.1023	2.9316	2.6245	2.3329	2.0227	1.8645	1.5635	1.5077	1.3061	1.2130
3.60	2.3236	2.1958	1.9658	1.7474	1.5150	1.3965	1.1711	1.1293	0.9782	0.9085

	</tableData>
   </table>
  </function>

</turbine_engine>
