<?xml version="1.0"?>
<?xml-stylesheet type="text/xsl" href="http://jsbsim.sourceforge.net/JSBSim.xsl"?>
<fdm_config name="unnamed" version="2.0" release="ALPHA"
   xmlns:xsi="http://www.w3.org/2001/XMLSchema-instance"
   xsi:noNamespaceSchemaLocation="http://jsbsim.sourceforge.net/JSBSim.xsd">

<fileheader>
	<author>
	Modèle. FDM Yasim. textures: Charles INGELS
	Aeromatic modèle JSBSim: Gérard ROBIN et Charles INGELS
	</author>
	<filecreationdate> 2009-09-13 </filecreationdate>
	<version>$Revision: 1.9 $</version>
	<description> Mikoyan Gurevitch Mig 31 "Foxhound". </description>
	<documentation>
  File:     unnamed.xml
  Inputs:
    name:          unnamed
    type:          two-engine transonic/supersonic fighter
    max weight:    101851 lb
    wing span:     44 feet  ft
    length:        75 feet  ft
    wing area:     663 sq-ft
    gear type:     tricycle
    retractable?:  yes
    # engines:     2
    engine type:   turbine
    engine layout: forward fuselage
    yaw damper?    no

  Outputs:
    wing loading:  153.62 lb/sq-ft
    CL-alpha:      3.6 per radian
    CL-0:          0.08
    CL-max:        1
    CD-0:          0.024
    K:             0.12

	</documentation>
</fileheader>


 <metrics>
	<wingarea  unit="M2">   61.60 </wingarea>
	<wingspan  unit="M" >   13.46 </wingspan>
	<wing_incidence>          2.00 </wing_incidence>
	<chord     unit="M" >    6.548 </chord>
	<htailarea unit="FT2">  162.60 </htailarea>
	<htailarm  unit="FT" >   50.00 </htailarm>
	<vtailarea unit="FT2">  169.34 </vtailarea>
	<vtailarm  unit="FT" >   40.00 </vtailarm>
	<!-- Position du centre d'application des forces aérodynamiques. -->
	<location name="AERORP" unit="M">
		<!--x>  4.4470 </x-->
		<x>  5 </x>
		<y>  0.0 </y>
		<z>  1.4680 </z>
	</location>
	<location name="EYEPOINT" unit="M">
		<x> 0.0 </x>
		<y> 0.0 </y>
		<!--z> 0.0 </z-->
	<z> 1.8432 </z>
	</location>
	<location name="VRP" unit="M">
		<!--x>6.71274</x-->
		<x>0</x>
		<y>0</y>
		<z>-1.7432</z>
		<!--z>0.0</z-->
	</location>
</metrics>

 <mass_balance>
   <ixx unit="SLUG*FT2">     77251 </ixx>
   <iyy unit="SLUG*FT2">    308518 </iyy>
   <izz unit="SLUG*FT2">    282359 </izz>
   <emptywt unit="LBS" >     48015 </emptywt>
   <!-- Position du centre de gravité. -->
   <location name="CG" unit="M">
     <x>  4.558 </x>
	 <!--x>  4.058 </x-->
     <y>   0.0  </y>
     <z>  1.875 </z>
   </location>
 </mass_balance>


 <ground_reactions>

     <contact type="BOGEY" name="NOSE">
         <location unit="M">
             <x> -2.004 </x>
             <y>  0.0 </y>
             <z> -2.65 </z>
         </location>
         <static_friction>  0.80 </static_friction>
         <dynamic_friction> 0.75 </dynamic_friction>
         <rolling_friction> 0.05 </rolling_friction>
         <spring_coeff unit="LBS/FT">      30555.30 </spring_coeff>
         <damping_coeff unit="LBS/FT/SEC"> 10185.10 </damping_coeff>
         <max_steer unit="DEG"> 40.00 </max_steer>
         <brake_group>NOSE</brake_group>
         <retractable>1</retractable>
     </contact>

     <contact type="BOGEY" name="LEFT_MAIN">
         <location unit="M">
             <!-- x> 6.291 </x -->
             <x> 7.302 </x>
             <y> -1.632 </y>
             <z> -2.75 </z>
         </location>
         <static_friction>  0.80 </static_friction>
         <dynamic_friction> 0.55 </dynamic_friction>
         <rolling_friction> 0.02 </rolling_friction>
         <spring_coeff unit="LBS/FT">      101851.00 </spring_coeff>
         <damping_coeff unit="LBS/FT/SEC"> 20370.20 </damping_coeff>
         <max_steer unit="DEG">0</max_steer>
         <brake_group>LEFT</brake_group>
         <retractable>1</retractable>
     </contact>

     <contact type="BOGEY" name="RIGHT_MAIN">
         <location unit="M">
             <x>  7.302 </x>
             <y>  1.632 </y>
             <z> -2.75 </z>
         </location>
         <static_friction>  0.80 </static_friction>
         <dynamic_friction> 0.55 </dynamic_friction>
         <rolling_friction> 0.02 </rolling_friction>
         <spring_coeff unit="LBS/FT">      101851.00 </spring_coeff>
         <damping_coeff unit="LBS/FT/SEC"> 20370.20 </damping_coeff>
         <max_steer unit="DEG">0</max_steer>
         <brake_group>RIGHT</brake_group>
         <retractable>1</retractable>
     </contact>


	<contact type="STRUCTURE" name="LEFT_WING1">
		<location unit="M">
			<x> 8.619 </x>
			<y>  5.526 </y>
			<z>  1.460 </z>
		</location>
		<static_friction>  1.0 </static_friction>
		<dynamic_friction> 1.0 </dynamic_friction>
		<spring_coeff unit="LBS/FT">      101851.00 </spring_coeff>
		<damping_coeff unit="LBS/FT/SEC"> 20370.20 </damping_coeff>
	</contact>
	<contact type="STRUCTURE" name="LEFT_WING2">
		<location unit="M">
			<x> 6.654 </x>
			<y>  5.522 </y>
			<z>  1.491 </z>
		</location>
		<static_friction>  1.0 </static_friction>
		<dynamic_friction> 1.0 </dynamic_friction>
		<spring_coeff unit="LBS/FT">      101851.00 </spring_coeff>
		<damping_coeff unit="LBS/FT/SEC"> 20370.20 </damping_coeff>
	</contact>

	<contact type="STRUCTURE" name="RIGHT_WING1">
		<location unit="M">
			<x> 8.600 </x>
			<y> -5.530 </y>
			<z>  1.466 </z>
		</location>
		<static_friction>  10.0 </static_friction>
		<dynamic_friction> 10.0 </dynamic_friction>
		<spring_coeff unit="LBS/FT">      101851.00 </spring_coeff>
		<damping_coeff unit="LBS/FT/SEC"> 20370.20 </damping_coeff>
	</contact>
	<contact type="STRUCTURE" name="RIGHT_WING2">
		<location unit="M">
			<x> 6.651 </x>
			<y> -5.522 </y>
			<z>  1.491 </z>
		</location>
		<static_friction>  10.0 </static_friction>
		<dynamic_friction> 10.0 </dynamic_friction>
		<spring_coeff unit="LBS/FT">      101851.00 </spring_coeff>
		<damping_coeff unit="LBS/FT/SEC"> 20370.20 </damping_coeff>
	</contact>

	<contact type="STRUCTURE" name="LEFT_SPAN1">
		<location unit="M">
			<x> 8.252 </x>
			<y> -1.208 </y>
			<z> -0.258 </z>
		</location>
		<static_friction> 1.0 </static_friction>
		<dynamic_friction> 1.0 </dynamic_friction>
		<spring_coeff unit="LBS/FT"> 1000.0 </spring_coeff>
		<damping_coeff unit="LBS/FT/SEC"> 1000.0 </damping_coeff>
	</contact>
	<contact type="STRUCTURE" name="LEFT_SPAN2">
		<location unit="M">
			<x> 10.446 </x>
			<y>  -1.072 </y>
			<z>   0.237 </z>
		</location>
		<static_friction> 1.0 </static_friction>
		<dynamic_friction> 1.0 </dynamic_friction>
		<spring_coeff unit="LBS/FT"> 1000.0 </spring_coeff>
		<damping_coeff unit="LBS/FT/SEC"> 1000.0 </damping_coeff>
	</contact>
	<contact type="STRUCTURE" name="RIGHT_SPAN1">
		<location unit="M">
			<x> 8.252 </x>
			<y>  1.230 </y>
			<z> -0.225 </z>
		</location>
		<static_friction> 1.0 </static_friction>
		<dynamic_friction> 1.0 </dynamic_friction>
		<spring_coeff unit="LBS/FT"> 1000.0 </spring_coeff>
		<damping_coeff unit="LBS/FT/SEC"> 1000.0 </damping_coeff>
	</contact>
	<contact type="STRUCTURE" name="RIGHT_SPAN2">
		<location unit="M">
			<x> 10.446 </x>
			<y>   1.075 </y>
			<z>   0.265 </z>
		</location>
		<static_friction> 1000.0 </static_friction>
		<dynamic_friction> 1000.0 </dynamic_friction>
		<spring_coeff unit="LBS/FT"> 1.0 </spring_coeff>
		<damping_coeff unit="LBS/FT/SEC"> 1.0 </damping_coeff>
	</contact>


 </ground_reactions>


 <propulsion>

	<engine file="D30F6">
		<location unit="M">
			<x> 8.671 </x>
			<y> -0.574 </y>
			<z>  1.269 </z>
		</location>
		<orient unit="DEG">
			<pitch> 0.00 </pitch>
			<roll>  0.00 </roll>
			<yaw>   0.00 </yaw>
		</orient>
		<feed>0</feed>
		<feed>1</feed>
		<feed>2</feed>
		<thruster file="direct">
			<location unit="M">
				<x> 8.671 </x>
				<y> -0.574 </y>
				<z>  1.269 </z>
			</location>
			<orient unit="DEG">
				<pitch> 0.00 </pitch>
				<roll>  0.00 </roll>
				<yaw>   0.00 </yaw>
			</orient>
		</thruster>
	</engine>

	<engine file="D30F6">
		<location unit="M">
			<x>  8.671 </x>
			<y>  0.574 </y>
			<z>  1.269 </z>
		</location>
		<orient unit="DEG">
			<pitch> 0.00 </pitch>
			<roll>  0.00 </roll>
			<yaw>   0.00 </yaw>
		</orient>
		<feed>0</feed>
		<feed>1</feed>
		<feed>2</feed>
		<thruster file="direct">
			<location unit="M">
				<x>  8.671 </x>
				<y>  0.574 </y>
				<z>  1.269 </z>
			</location>
			<orient unit="DEG">
				<pitch> 0.00 </pitch>
				<roll>  0.00 </roll>
				<yaw>   0.00 </yaw>
			</orient>
		</thruster>
	</engine>


  <tank type="FUEL" number="0">
     <location unit="M">
       <x>  5.028 </x>
       <y>  2.1725 </y>
       <z>  1.954 </z>
     </location>
     <capacity unit="LBS"> 9000.00 </capacity>
     <contents unit="LBS"> 8624.00 </contents>
  </tank>

  <tank type="FUEL" number="1">
     <location unit="M">
       <x>  5.028 </x>
       <y> -2.1725 </y>
       <z>  1.954 </z>
     </location>
     <capacity unit="LBS"> 9000.00 </capacity>
     <contents unit="LBS"> 8624.00 </contents>
  </tank>

  <tank type="FUEL" number="2">
     <location unit="M">
       <x> 2.542 </x>
       <y>   0.00 </y>
       <z>  1.063 </z>
     </location>
     <capacity unit="LBS"> 19000.00 </capacity>
     <contents unit="LBS"> 18700.00 </contents>
  </tank>

 </propulsion>


 <flight_control name="FCS: unnamed">

  <channel name="Pitch">
   <summer name="Pitch Trim Sum">
      <input>fcs/elevator-cmd-norm</input>
      <input>fcs/pitch-trim-cmd-norm</input>
      <clipto>
        <min> -1 </min>
        <max>  1 </max>
      </clipto>
   </summer>

   <aerosurface_scale name="Elevator Control">
      <input>fcs/pitch-trim-sum</input>
      <range>
        <min> -0.35 </min>
        <max>  0.35 </max>
      </range>
      <output>fcs/elevator-pos-rad</output>
   </aerosurface_scale>

   <aerosurface_scale name="elevator normalization">
      <input>fcs/elevator-pos-rad</input>
      <domain>
        <min> -0.35 </min>
        <max>  0.35 </max>
      </domain>
      <range>
        <min> -1 </min>
        <max>  1 </max>
      </range>
      <output>fcs/elevator-pos-norm</output>
   </aerosurface_scale>

  </channel>


  <channel name="Roll">
   <summer name="Roll Trim Sum">
      <input>fcs/aileron-cmd-norm</input>
      <input>fcs/roll-trim-cmd-norm</input>
      <clipto>
        <min> -1 </min>
        <max>  1 </max>
      </clipto>
   </summer>

   <aerosurface_scale name="Left Aileron Control">
      <input>fcs/roll-trim-sum</input>
      <range>
        <min> -0.35 </min>
        <max>  0.35 </max>
      </range>
      <output>fcs/left-aileron-pos-rad</output>
   </aerosurface_scale>

   <aerosurface_scale name="Right Aileron Control">
      <input>fcs/roll-trim-sum</input>
      <range>
        <min> -0.35 </min>
        <max>  0.35 </max>
      </range>
      <output>fcs/right-aileron-pos-rad</output>
   </aerosurface_scale>

   <aerosurface_scale name="left aileron normalization">
      <input>fcs/left-aileron-pos-rad</input>
      <domain>
        <min> -0.35 </min>
        <max>  0.35 </max>
      </domain>
      <range>
        <min> -1 </min>
        <max>  1 </max>
      </range>
      <output>fcs/left-aileron-pos-norm</output>
   </aerosurface_scale>

   <aerosurface_scale name="right aileron normalization">
      <input>fcs/right-aileron-pos-rad</input>
      <domain>
        <min> -0.35 </min>
        <max>  0.35 </max>
      </domain>
      <range>
        <min> -1 </min>
        <max>  1 </max>
      </range>
      <output>fcs/right-aileron-pos-norm</output>
   </aerosurface_scale>

  </channel>

  <channel name="Yaw">
   <summer name="Rudder Command Sum">
      <input>fcs/rudder-cmd-norm</input>
      <input>fcs/yaw-trim-cmd-norm</input>
      <clipto>
        <min> -0.35 </min>
        <max>  0.35 </max>
      </clipto>
   </summer>

   <aerosurface_scale name="Rudder Control">
      <input>fcs/rudder-command-sum</input>
      <range>
        <min> -0.35 </min>
        <max>  0.35 </max>
      </range>
      <output>fcs/rudder-pos-rad</output>
   </aerosurface_scale>

   <aerosurface_scale name="rudder normalization">
      <input>fcs/rudder-pos-rad</input>
      <domain>
        <min> -0.35 </min>
        <max>  0.35 </max>
      </domain>
      <range>
        <min> -1 </min>
        <max>  1 </max>
      </range>
      <output>fcs/rudder-pos-norm</output>
   </aerosurface_scale>

  </channel>

  <channel name="Flaps">
   <kinematic name="Flaps Control">
     <input>fcs/flap-cmd-norm</input>
     <traverse>
       <setting>
          <position>  0 </position>
          <time>      0 </time>
       </setting>
       <setting>
          <position> 15 </position>
          <time>      4 </time>
       </setting>
       <setting>
          <position> 30 </position>
          <time>      3 </time>
       </setting>
     </traverse>
     <output>fcs/flap-pos-deg</output>
   </kinematic>

   <aerosurface_scale name="flap normalization">
      <input>fcs/flap-pos-deg</input>
      <domain>
        <min>  0 </min>
        <max> 30 </max>
      </domain>
      <range>
        <min> 0 </min>
        <max> 1 </max>
      </range>
      <output>fcs/flap-pos-norm</output>
   </aerosurface_scale>

  </channel>

  <channel name="Landing Gear">
   <kinematic name="Gear Control">
     <input>gear/gear-cmd-norm</input>
     <traverse>
       <setting>
          <position> 0 </position>
          <time>     0 </time>
       </setting>
       <setting>
          <position> 1 </position>
          <time>     9 </time>
       </setting>
     </traverse>
     <output>gear/gear-pos-norm</output>
   </kinematic>

  </channel>

  <channel name="Speedbrake">
   <kinematic name="Speedbrake Control">
     <input>fcs/speedbrake-cmd-norm</input>
     <traverse>
       <setting>
          <position> 0 </position>
          <time>     0 </time>
       </setting>
       <setting>
          <position> 1 </position>
          <time>     1 </time>
       </setting>
     </traverse>
     <output>fcs/speedbrake-pos-norm</output>
   </kinematic>

  </channel>

 </flight_control>


	<aerodynamics>

		<axis name="LIFT">

			<function name="aero/coefficient/CLalpha">
				<description>Lift_due_to_alpha</description>
				<product>
					<property>aero/qbar-psf</property>
					<property>metrics/Sw-sqft</property>
					<table>
						<independentVar lookup="row">aero/alpha-rad</independentVar>
						<tableData>
						-0.20  -0.640
						 0.00   0.080
						 0.26   0.8
						 0.35   1.2
						 0.6    1.5
						 1.0    1.65
						 1.5    1.7
						 1.9    1.4
						 2.0    0.96
						 2.5    0.4
						</tableData>
					</table>
				</product>
			</function>

			<function name="aero/coefficient/dCLflap">
				<description>Delta_Lift_due_to_flaps</description>
				<product>
					<property>aero/qbar-psf</property>
					<property>metrics/Sw-sqft</property>
					<property>fcs/flap-pos-deg</property>
					<!-- value> 0.01167 </value -->
					<value> 0.025 </value>
				</product>
			</function>

			<function name="aero/coefficient/dCLsb">
				<description>Delta_Lift_due_to_speedbrake</description>
				<product>
					<property>aero/qbar-psf</property>
					<property>metrics/Sw-sqft</property>
					<property>fcs/speedbrake-pos-norm</property>
					<value>0</value>
				</product>
			</function>

			<function name="aero/coefficient/CLde">
				<description>Lift_due_to_Elevator_Deflection</description>
				<product>
					<property>aero/qbar-psf</property>
					<property>metrics/Sw-sqft</property>
					<property>fcs/elevator-pos-rad</property>
					<!-- <value>0.2</value> -->
					<value>0.8</value>
			</product>
		</function>

		</axis>


	<axis name="DRAG">

    <function name="aero/coefficient/CD0">
       <description>Drag_at_zero_lift</description>
       <product>
          <property>aero/qbar-psf</property>
          <property>metrics/Sw-sqft</property>
          <table>
            <independentVar lookup="row">aero/alpha-rad</independentVar>
            <tableData>
             -1.570   1.091
						 -0.987   0.534
						 -0.260   0.221
						 -0.109   0.082
						  0.00    0.024
              0.109   0.082
							0.260   0.221
							0.987   0.534
              1.570   1.091
            </tableData>
          </table>
       </product>
    </function>

    <function name="aero/coefficient/CDi">
       <description>Induced_drag</description>
         <product>
           <property>aero/qbar-psf</property>
           <property>metrics/Sw-sqft</property>
           <property>aero/cl-squared</property>
           <value>0.09575</value>
           <!--value>0.05926</value-->
         </product>
    </function>

    <function name="aero/coefficient/CDmach">
       <description>Drag_due_to_mach</description>
        <product>
          <property>aero/qbar-psf</property>
          <property>metrics/Sw-sqft</property>
          <table>
            <independentVar lookup="row">velocities/mach</independentVar>

            <tableData>
0.0	0.0007
0.79	0.0012
1.100	0.0098
1.150	0.0135
1.300	0.0160
1.700	0.0185
1.800	0.0197
2.000	0.0209
2.200	0.0221
2.350	0.0242
2.500	0.0278
2.700	0.0326
2.950	0.0397
3.030	0.0536
3.5000	0.0737

            </tableData>
          </table>
        </product>
    </function>

    <function name="aero/coefficient/CDflap">
       <description>Drag_due_to_flaps</description>
         <product>
           <property>aero/qbar-psf</property>
           <property>metrics/Sw-sqft</property>
           <property>fcs/flap-pos-deg</property>
           <value> 0.00350 </value>
         </product>
    </function>

    <function name="aero/coefficient/CDgear">
       <description>Drag_due_to_gear</description>
         <product>
           <property>aero/qbar-psf</property>
           <property>metrics/Sw-sqft</property>
           <property>gear/gear-pos-norm</property>
           <!-- value>0.02</value -->
		   <value>0.059</value>
         </product>
    </function>

    <function name="aero/coefficient/CDsb">
       <description>Drag_due_to_speedbrakes</description>
         <product>
           <property>aero/qbar-psf</property>
           <property>metrics/Sw-sqft</property>
           <property>fcs/speedbrake-pos-norm</property>
           <!-- value>0.024</value -->
		   <value>0.075</value>
         </product>
    </function>

    <function name="aero/coefficient/CDbeta">
       <description>Drag_due_to_sideslip</description>
       <product>
          <property>aero/qbar-psf</property>
          <property>metrics/Sw-sqft</property>
          <table>
            <independentVar lookup="row">aero/beta-rad</independentVar>
            <tableData>
              -1.57       1.230
              -0.26    0.050
               0.00       0.000
               0.26    0.050
               1.57       1.230
            </tableData>
          </table>
       </product>
    </function>

    <function name="aero/coefficient/CDde">
       <description>Drag_due_to_Elevator_Deflection</description>
       <product>
           <property>aero/qbar-psf</property>
           <property>metrics/Sw-sqft</property>
           <abs><property>fcs/elevator-pos-norm</property></abs>
           <value>0.065</value>
       </product>
    </function>

  </axis>


  <axis name="SIDE">

    <function name="aero/coefficient/CYb">
       <description>Side_force_due_to_beta</description>
       <product>
           <property>aero/qbar-psf</property>
           <property>metrics/Sw-sqft</property>
           <property>aero/beta-rad</property>
           <value>-1</value>
       </product>
    </function>

  </axis>

  <axis name="ROLL">

    <function name="aero/coefficient/Clb">
       <description>Roll_moment_due_to_beta</description>
       <product>
           <property>aero/qbar-psf</property>
           <property>metrics/Sw-sqft</property>
           <property>metrics/bw-ft</property>
           <property>aero/beta-rad</property>
           <value>-0.1</value>
       </product>
    </function>

    <function name="aero/coefficient/Clp">
       <description>Roll_moment_due_to_roll_rate</description>
       <product>
           <property>aero/qbar-psf</property>
           <property>metrics/Sw-sqft</property>
           <property>metrics/bw-ft</property>
           <property>aero/bi2vel</property>
           <property>velocities/p-aero-rad_sec</property>
           <value>-0.4</value>
       </product>
    </function>

    <function name="aero/coefficient/Clr">
       <description>Roll_moment_due_to_yaw_rate</description>
       <product>
           <property>aero/qbar-psf</property>
           <property>metrics/Sw-sqft</property>
           <property>metrics/bw-ft</property>
           <property>aero/bi2vel</property>
           <property>velocities/r-aero-rad_sec</property>
           <value>0.15</value>
       </product>
    </function>

    <function name="aero/coefficient/Clda">
       <description>Roll_moment_due_to_aileron</description>
       <product>
          <property>aero/qbar-psf</property>
          <property>metrics/Sw-sqft</property>
          <property>metrics/bw-ft</property>
          <property>fcs/left-aileron-pos-rad</property>
          <table>
            <independentVar lookup="row">velocities/mach</independentVar>
            <tableData>
              0.0    0.120
              2.0    0.040
            </tableData>
          </table>
       </product>
    </function>

    <function name="aero/coefficient/Cldr">
       <description>Roll_moment_due_to_rudder</description>
       <product>
           <property>aero/qbar-psf</property>
           <property>metrics/Sw-sqft</property>
           <property>metrics/bw-ft</property>
           <property>fcs/rudder-pos-rad</property>
           <value>0.01</value>
       </product>
    </function>

  </axis>

  <axis name="PITCH">

    <function name="aero/coefficient/Cmalpha">
       <description>Pitch_moment_due_to_alpha</description>
       <product>
           <property>aero/qbar-psf</property>
           <property>metrics/Sw-sqft</property>
           <property>metrics/cbarw-ft</property>
           <property>aero/alpha-rad</property>
           <value>-0.3</value>
       </product>
    </function>

    <function name="aero/coefficient/Cmde">
       <description>Pitch_moment_due_to_elevator</description>
       <product>
          <property>aero/qbar-psf</property>
          <property>metrics/Sw-sqft</property>
          <property>metrics/cbarw-ft</property>
          <property>fcs/elevator-pos-rad</property>
          <table>
            <independentVar lookup="row">velocities/mach</independentVar>
            <tableData>
              0.0     -0.800
              2.0     -0.200
            </tableData>
          </table>
       </product>
    </function>

    <function name="aero/coefficient/Cmq">
       <description>Pitch_moment_due_to_pitch_rate</description>
       <product>
           <property>aero/qbar-psf</property>
           <property>metrics/Sw-sqft</property>
           <property>metrics/cbarw-ft</property>
           <property>aero/ci2vel</property>
           <property>velocities/q-aero-rad_sec</property>
           <value>-18</value>
       </product>
    </function>

    <function name="aero/coefficient/Cmadot">
       <description>Pitch_moment_due_to_alpha_rate</description>
       <product>
           <property>aero/qbar-psf</property>
           <property>metrics/Sw-sqft</property>
           <property>metrics/cbarw-ft</property>
           <property>aero/ci2vel</property>
           <property>aero/alphadot-rad_sec</property>
           <value>-9</value>
       </product>
    </function>

  </axis>

  <axis name="YAW">

    <function name="aero/coefficient/Cnb">
       <description>Yaw_moment_due_to_beta</description>
       <product>
           <property>aero/qbar-psf</property>
           <property>metrics/Sw-sqft</property>
           <property>metrics/bw-ft</property>
           <property>aero/beta-rad</property>
           <value>0.12</value>
       </product>
    </function>

    <function name="aero/coefficient/Cnr">
       <description>Yaw_moment_due_to_yaw_rate</description>
       <product>
           <property>aero/qbar-psf</property>
           <property>metrics/Sw-sqft</property>
           <property>metrics/bw-ft</property>
           <property>aero/bi2vel</property>
           <property>velocities/r-aero-rad_sec</property>
           <value>-0.15</value>
       </product>
    </function>

    <function name="aero/coefficient/Cndr">
       <description>Yaw_moment_due_to_rudder</description>
       <product>
           <property>aero/qbar-psf</property>
           <property>metrics/Sw-sqft</property>
           <property>metrics/bw-ft</property>
           <property>fcs/rudder-pos-rad</property>
           <value>-0.1</value>
       </product>
    </function>

    <function name="aero/coefficient/Cnda">
       <description>Adverse_yaw</description>
       <product>
           <property>aero/qbar-psf</property>
           <property>metrics/Sw-sqft</property>
           <property>metrics/bw-ft</property>
           <property>fcs/left-aileron-pos-rad</property>
           <value>0</value>
       </product>
    </function>

  </axis>

 </aerodynamics>

</fdm_config>
